OpenVSP model (file version 5), 5 components.
Geometry view with OpenVSP parameter names; values to 6 digits, angles in degrees, lengths in the model's unit.
Overall bounding box: X_Min=0 X_Len=35.8 Y_Min=-16.9998 Y_Len=33.9996 Z_Min=-1.98 Z_Len=9.83018

Wing "HTail"
  location (X Y Z) 30.072 0 1.09947, rotation 0 0 0
  symmetric about XZ
  bounding box size 5.12207 12.4807 0.902106
  totals: TotalSpan=12.4499 TotalProjectedSpan=12.3817 TotalChord=2.48998 TotalArea=31 TotalAR=4.94537
  root: chord 3.84553, twist 0, NACA 4-series Camber=0 CamberLoc=0.1 ThickChord=0.1
  sections:
    n  Span     Root_Chord  Tip_Chord  Area  Sweep  Sweep_Location  Dihedral  Twist  Twist_Location  tip airfoil
    1  6.22495  3.84553     1.13443    15.5  28     0.25            6         0      0               as above

Wing "VTail"
  location (X Y Z) 27.387 0 1.98, rotation 90 0 0
  bounding box size 6.78809 0.564063 5.87018
  totals: TotalSpan=5.87018 TotalProjectedSpan=5.87018 TotalChord=3.66428 TotalArea=21.51 TotalAR=1.602
  root: chord 5.63736, twist 0, NACA 4-series Camber=0 CamberLoc=0.1 ThickChord=0.1
  sections:
    n  Span     Root_Chord  Tip_Chord  Area     Sweep    Sweep_Location  Dihedral  Twist  Twist_Location  tip airfoil
    1  2.93509  5.63736     3.66428    13.6506  11.0911  1               0         0      0               as above
    2  2.93509  3.66428     1.69121    7.85942  35       0.25            0         0      0               as above

Wing "Wing"
  location (X Y Z) 11.277 0 -0.99, rotation 0 0 0
  symmetric about XZ
  bounding box size 10.4125 33.9996 2.11626
  totals: TotalSpan=33.9404 TotalProjectedSpan=33.806 TotalChord=4.06963 TotalArea=122.6 TotalAR=9.32175
  root: chord 6.74058, twist 0, NACA 4-series Camber=0.02 CamberLoc=0.3 ThickChord=0.177273
  sections:
    n  Span     Root_Chord  Tip_Chord  Area     Sweep    Sweep_Location  Dihedral  Twist  Twist_Location  tip airfoil
    1  5.43046  6.74058     3.93988    28.9999  0        1               5.1       0      0               NACA 4-series Camber=0.02 CamberLoc=0.3 ThickChord=0.13
    2  11.5397  3.93988     1.65818    32.3001  27.2819  0               5.1       0      0               as above

Fuselage "Fuselage"
  location (X Y Z) 0 0 0, rotation 0 0 0
  bounding box size 35.8 3.96 3.96
  Design: Length=35.8
  cross sections:
    n  XLocPercent  YLocPercent  ZLocPercent  shape
    0  0            0            -0.0192654   circle Circle_Diameter=0
    1  0.023727     0            -0.017338    circle Circle_Diameter=1.683
    2  0.044434     0            -0.0154832   circle Circle_Diameter=2.20572
    3  0.071899     0            -0.0063352   circle Circle_Diameter=3.15216
    4  0.107427     0            -0.00213687  circle Circle_Diameter=3.6036
    5  0.173269     0            0            circle Circle_Diameter=3.96
    6  0.634972     0            0            as above
    7  0.817486     0            0.0125547    circle Circle_Diameter=3.06108
    8  0.984155     0            0.0370559    circle Circle_Diameter=1.3068
    9  1            0            0.0370559    circle Circle_Diameter=0

Fuselage "DorsalTank", child of "Fuselage"
  location (X Y Z) 4 0 3.48, rotation 0 0 0
  bounding box size 23.9764 3 3
  Design: Length=23.5
  cross sections:
    n  XLocPercent  YLocPercent  ZLocPercent  shape
    0  0            0            0            point
    1  0.05         0            0            circle Circle_Diameter=3
    2  0.5          0            0            as above
    3  0.95         0            0            as above
    4  1            0            0            point
